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/batch
! ANSYS input file written by Workbench version 18.1 RELEASE
! File used for geometry attach: C:\Users\HP\Documents\EPSA\freinage\modele\disque_troue_1_files\dp0\SYS\DM\SYS.agdb
/title,disque_troue_1--Thermique stationnaire (A5)
/com,--- Data in consistent MKS units. See Solving Units in the help system for more information.
/units,MKS
/prep7
! Turn off shape checking because checks already performed inside WB mesher.
! See help system for more information.
SHPP,OFF,,NOWARN
etcon,set             ! allow ANSYS to choose best KEYOP's for 180x elements
/com,*********** Nodes for the whole assembly ***********
nblock,3,,8268
(1i9,3e20.9e3)
        1   -3.961339425E-002    2.250000000E-003    8.899106503E-002
        2   -4.029889038E-002    2.250000000E-003    8.812293831E-002
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-1
/com,*********** Elements for Body 1 "Solide" ***********
et,1,90
eblock,19,solid,,1072
(19i9)
        1        1        1        1        0        0        0        0       20        0        1       45       46       47      103      596      595      594      538
     2438     2445     2450     2439     4470     4468     4352     4353     2441     2446     2451     2738
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-1
/com,*********** Send User Defined Coordinate System(s) ***********
csys,0
toffst,273.15,  ! Temperature offset from absolute zero
/com,*********** Send Materials ***********
MP,DENS,1,7850,	! kg m^-3
MP,ALPX,1,1.2e-05,	! C^-1
MP,C,1,434,	! J kg^-1 C^-1
MP,KXX,1,60.5,	! W m^-1 C^-1
MP,RSVX,1,1.7e-07,	! kg m^3 A^-2 s^-3
MP,EX,1,200000000000,	! Pa
MP,NUXY,1,0.3,
MP,MURX,1,10000,

!************************* Model Summary ********************
!Solide,	Acier standard,	matid,	1
!************************* End Model Summary ********************
/com,*********** Create "Flux de chaleur" ***********
et,2,152
eblock,10,,,1072
(15i9)
     1073        2        2        2        0      896      681      683      683     4639     4637      683     4645
     1074        2        2        2        0      775      776      890      890     4938     4942      890     4940
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-1
esel,s,type,,2
keyop,2,8,1      ! include heat flux

*DIM,_loadvari38,TABLE,2,1,1,TIME,
! Time values
_loadvari38(1,0,1) = 0.
_loadvari38(2,0,1) = 1.
! Load values
_loadvari38(1,1,1) = 0.
_loadvari38(2,1,1) = 3300000.

esel,all
fcum,add                   ! add nodal forces up (needed in case have loads on the same edge,vertex)
fcum                       ! reset default on fcum command since done sending WB F loads
/com,*********** Create "Convection" ***********
et,3,152
eblock,10,,,1888
(15i9)
     2145        3        3        3        0      385      598      600      600     3914     4476      600     3915
     2146        3        3        3        0      506      391      505      505     3937     3936      505     4275
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-1
esel,s,type,,3
keyop,3,8,2.
keyop,3,13,0.

*DIM,_convvari34,TABLE,2,1,1,TIME,
! Time values
_convvari34(1,0,1) = 0.
_convvari34(2,0,1) = 1.
! Load values
_convvari34(1,1,1) = 0.
_convvari34(2,1,1) = 80.


*DIM,_loadvari34,TABLE,2,1,1,TIME,
! Time values
_loadvari34(1,0,1) = 0.
_loadvari34(2,0,1) = 1.
! Load values
_loadvari34(1,1,1) = 40.
_loadvari34(2,1,1) = 40.

esel,all
/com,*********** Create "ToAmbient" Radiation ***********

*DIM,_loadvari36,TABLE,2,1,1,TIME,
! Time values
_loadvari36(1,0,1) = 0.
_loadvari36(2,0,1) = 1.
! Load values
_loadvari36(1,1,1) = 40.
_loadvari36(2,1,1) = 40.

n,7518,_ASMDIAG*0.5*1,0.,0.
nsel,s,node,,7518
cm,_SPND36,node
nsel,all
et,4,152
keyop,4,5,1             ! Extra node
keyop,4,9,1             ! Use radiation with the form factor real constant
eblock,10,,,1888
(15i9)
     4033        4        4        4        0      385      598      600      600     3914     4476      600     3915     7518
     4034        4        4        4        0      506      391      505      505     3937     3936      505     4275     7518
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-1
esel,s,type,,4
mp,emis,4,1.
r,4,1.,5.669e-008
stef,5.669e-008
esel,all
nsel,all
/com,***************** Define Uniform Initial temperature ***************
tunif,40.
fini
/com,****************************************************************************
/com,*************************    SOLUTION       ********************************
/com,****************************************************************************
/solu
antype,0                   ! static analysis
!eqsl,sparse               ! using sparse solver which is default so no eqsl command needed
cntr,print,1               ! print out contact info and also make no initial contact an error
rescontrol,,none                 ! Do not keep any restart files
dmpoption,emat,no             ! Don't combine emat file for DANSYS
dmpoption,esav,no             ! Don't combine esav file for DANSYS
/com,****************************************************
/com,******************* SOLVE FOR LS 1 OF 20 ****************
esel,s,type,,2
nsle
sf,all,hflux,%_loadvari38%
nsel,all
esel,all
esel,s,type,,3
nsle
sf,all,conv,%_convvari34%,%_loadvari34%
nsel,all
esel,all
d,_SPND36,temp,%_loadvari36%
autots,on
nsub,1,10,1
time,1.
outres,erase
outres,all,none
outres,nsol,all
outres,rsol,all
outres,fflux,all
esel,s,mat,,3
esel,a,mat,,4
cm,_elmisc,elem
esel,all
outres,misc,all,_elmisc
cnvtol,heat,,.001,,1.e-006	! Program Controlled. Set MINREF equivalent of 1e-6 Watts
! *********** WB SOLVE COMMAND ***********
! check interactive state
*get,ANSINTER_,active,,int
*if,ANSINTER_,ne,0,then
/eof
*endif
solve
/com *************** Write FE CONNECTORS *********
CEWRITE,file,ce,,INTE
/com,****************************************************
/com,*************** FINISHED SOLVE FOR LS 1 *************
/com,****************************************************
/com,******************* SOLVE FOR LS 2 OF 20 ****************
autots,on
nsub,1,10,1
time,2.
outres,erase
outres,all,none
outres,nsol,all
outres,rsol,all
outres,fflux,all
outres,misc,all,_elmisc
cnvtol,heat,,.001,,1.e-006	! Program Controlled. Set MINREF equivalent of 1e-6 Watts
solve
/com,****************************************************
/com,*************** FINISHED SOLVE FOR LS 2 *************
/com,****************************************************
/com,******************* SOLVE FOR LS 3 OF 20 ****************
autots,on
nsub,1,10,1
time,3.
outres,erase
outres,all,none
outres,nsol,all
outres,rsol,all
outres,fflux,all
outres,misc,all,_elmisc
cnvtol,heat,,.001,,1.e-006	! Program Controlled. Set MINREF equivalent of 1e-6 Watts
solve
/com,****************************************************
/com,*************** FINISHED SOLVE FOR LS 3 *************
/com,****************************************************
/com,******************* SOLVE FOR LS 4 OF 20 ****************
autots,on
nsub,1,10,1
time,4.
outres,erase
outres,all,none
outres,nsol,all
outres,rsol,all
outres,fflux,all
outres,misc,all,_elmisc
cnvtol,heat,,.001,,1.e-006	! Program Controlled. Set MINREF equivalent of 1e-6 Watts
solve
/com,****************************************************
/com,*************** FINISHED SOLVE FOR LS 4 *************
/com,****************************************************
/com,******************* SOLVE FOR LS 5 OF 20 ****************
autots,on
nsub,1,10,1
time,5.
outres,erase
outres,all,none
outres,nsol,all
outres,rsol,all
outres,fflux,all
outres,misc,all,_elmisc
cnvtol,heat,,.001,,1.e-006	! Program Controlled. Set MINREF equivalent of 1e-6 Watts
solve
/com,****************************************************
/com,*************** FINISHED SOLVE FOR LS 5 *************
/com,****************************************************
/com,******************* SOLVE FOR LS 6 OF 20 ****************
autots,on
nsub,1,10,1
time,6.
outres,erase
outres,all,none
outres,nsol,all
outres,rsol,all
outres,fflux,all
outres,misc,all,_elmisc
cnvtol,heat,,.001,,1.e-006	! Program Controlled. Set MINREF equivalent of 1e-6 Watts
solve
/com,****************************************************
/com,*************** FINISHED SOLVE FOR LS 6 *************
/com,****************************************************
/com,******************* SOLVE FOR LS 7 OF 20 ****************
autots,on
nsub,1,10,1
time,7.
outres,erase
outres,all,none
outres,nsol,all
outres,rsol,all
outres,fflux,all
outres,misc,all,_elmisc
cnvtol,heat,,.001,,1.e-006	! Program Controlled. Set MINREF equivalent of 1e-6 Watts
solve
/com,****************************************************
/com,*************** FINISHED SOLVE FOR LS 7 *************
/com,****************************************************
/com,******************* SOLVE FOR LS 8 OF 20 ****************
autots,on
nsub,1,10,1
time,8.
outres,erase
outres,all,none
outres,nsol,all
outres,rsol,all
outres,fflux,all
outres,misc,all,_elmisc
cnvtol,heat,,.001,,1.e-006	! Program Controlled. Set MINREF equivalent of 1e-6 Watts
solve
/com,****************************************************
/com,*************** FINISHED SOLVE FOR LS 8 *************
/com,****************************************************
/com,******************* SOLVE FOR LS 9 OF 20 ****************
autots,on
nsub,1,10,1
time,9.
outres,erase
outres,all,none
outres,nsol,all
outres,rsol,all
outres,fflux,all
outres,misc,all,_elmisc
cnvtol,heat,,.001,,1.e-006	! Program Controlled. Set MINREF equivalent of 1e-6 Watts
solve
/com,****************************************************
/com,*************** FINISHED SOLVE FOR LS 9 *************
/com,****************************************************
/com,******************* SOLVE FOR LS 10 OF 20 ****************
autots,on
nsub,1,10,1
time,10.
outres,erase
outres,all,none
outres,nsol,all
outres,rsol,all
outres,fflux,all
outres,misc,all,_elmisc
cnvtol,heat,,.001,,1.e-006	! Program Controlled. Set MINREF equivalent of 1e-6 Watts
solve
/com,****************************************************
/com,*************** FINISHED SOLVE FOR LS 10 *************
/com,****************************************************
/com,******************* SOLVE FOR LS 11 OF 20 ****************
autots,on
nsub,1,10,1
time,11.
outres,erase
outres,all,none
outres,nsol,all
outres,rsol,all
outres,fflux,all
outres,misc,all,_elmisc
cnvtol,heat,,.001,,1.e-006	! Program Controlled. Set MINREF equivalent of 1e-6 Watts
solve
/com,****************************************************
/com,*************** FINISHED SOLVE FOR LS 11 *************
/com,****************************************************
/com,******************* SOLVE FOR LS 12 OF 20 ****************
autots,on
nsub,1,10,1
time,12.
outres,erase
outres,all,none
outres,nsol,all
outres,rsol,all
outres,fflux,all
outres,misc,all,_elmisc
cnvtol,heat,,.001,,1.e-006	! Program Controlled. Set MINREF equivalent of 1e-6 Watts
solve
/com,****************************************************
/com,*************** FINISHED SOLVE FOR LS 12 *************
/com,****************************************************
/com,******************* SOLVE FOR LS 13 OF 20 ****************
autots,on
nsub,1,10,1
time,13.
outres,erase
outres,all,none
outres,nsol,all
outres,rsol,all
outres,fflux,all
outres,misc,all,_elmisc
cnvtol,heat,,.001,,1.e-006	! Program Controlled. Set MINREF equivalent of 1e-6 Watts
solve
/com,****************************************************
/com,*************** FINISHED SOLVE FOR LS 13 *************
/com,****************************************************
/com,******************* SOLVE FOR LS 14 OF 20 ****************
autots,on
nsub,1,10,1
time,14.
outres,erase
outres,all,none
outres,nsol,all
outres,rsol,all
outres,fflux,all
outres,misc,all,_elmisc
cnvtol,heat,,.001,,1.e-006	! Program Controlled. Set MINREF equivalent of 1e-6 Watts
solve
/com,****************************************************
/com,*************** FINISHED SOLVE FOR LS 14 *************
/com,****************************************************
/com,******************* SOLVE FOR LS 15 OF 20 ****************
autots,on
nsub,1,10,1
time,15.
outres,erase
outres,all,none
outres,nsol,all
outres,rsol,all
outres,fflux,all
outres,misc,all,_elmisc
cnvtol,heat,,.001,,1.e-006	! Program Controlled. Set MINREF equivalent of 1e-6 Watts
solve
/com,****************************************************
/com,*************** FINISHED SOLVE FOR LS 15 *************
/com,****************************************************
/com,******************* SOLVE FOR LS 16 OF 20 ****************
autots,on
nsub,1,10,1
time,16.
outres,erase
outres,all,none
outres,nsol,all
outres,rsol,all
outres,fflux,all
outres,misc,all,_elmisc
cnvtol,heat,,.001,,1.e-006	! Program Controlled. Set MINREF equivalent of 1e-6 Watts
solve
/com,****************************************************
/com,*************** FINISHED SOLVE FOR LS 16 *************
/com,****************************************************
/com,******************* SOLVE FOR LS 17 OF 20 ****************
autots,on
nsub,1,10,1
time,17.
outres,erase
outres,all,none
outres,nsol,all
outres,rsol,all
outres,fflux,all
outres,misc,all,_elmisc
cnvtol,heat,,.001,,1.e-006	! Program Controlled. Set MINREF equivalent of 1e-6 Watts
solve
/com,****************************************************
/com,*************** FINISHED SOLVE FOR LS 17 *************
/com,****************************************************
/com,******************* SOLVE FOR LS 18 OF 20 ****************
autots,on
nsub,1,10,1
time,18.
outres,erase
outres,all,none
outres,nsol,all
outres,rsol,all
outres,fflux,all
outres,misc,all,_elmisc
cnvtol,heat,,.001,,1.e-006	! Program Controlled. Set MINREF equivalent of 1e-6 Watts
solve
/com,****************************************************
/com,*************** FINISHED SOLVE FOR LS 18 *************
/com,****************************************************
/com,******************* SOLVE FOR LS 19 OF 20 ****************
autots,on
nsub,1,10,1
time,19.
outres,erase
outres,all,none
outres,nsol,all
outres,rsol,all
outres,fflux,all
outres,misc,all,_elmisc
cnvtol,heat,,.001,,1.e-006	! Program Controlled. Set MINREF equivalent of 1e-6 Watts
solve
/com,****************************************************
/com,*************** FINISHED SOLVE FOR LS 19 *************
/com,****************************************************
/com,******************* SOLVE FOR LS 20 OF 20 ****************
autots,on
nsub,1,10,1
time,20.
outres,erase
outres,all,none
outres,nsol,all
outres,rsol,all
outres,fflux,all
outres,misc,all,_elmisc
cnvtol,heat,,.001,,1.e-006	! Program Controlled. Set MINREF equivalent of 1e-6 Watts
solve
/com,****************************************************
/com,*************** FINISHED SOLVE FOR LS 20 *************
/post1
fini
